units           lj
timestep        0.001
atom_style      atomic
lattice         fcc 0.8442
region          box block 0 3 0 3 0 3
create_box      1 box
create_atoms    1 box
mass            1 1.0
velocity        all create 1.44 87287 loop geom
pair_style      lj/cut 2.5
pair_coeff      1 1 1.0 1.0 2.5
neighbor        0.3 bin
neigh_modify    every 1 delay 0 check yes
fix             1 all nve
compute         ctemp all temp
compute         cke all ke
run             50000
